*Heading
** Job name: Job Model name: Model-1
** Generated by: Abaqus/CAE 2021.HF4
*Preprint, echo=NO, model=NO, history=NO, contact=NO
**
** PARTS
**
*Part, name=indenter
*End Part
**
*Part, name=part
*Node
      1,   27.2275162,   11.1349764
      2,   26.1349754,   12.2275162
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*Element, type=CPE4H
   1,  379,  279,  278,  410
   2,  603,  539,  608,  621
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*Nset, nset=_PickedSet6, internal, generate
    1,  1769,     1
*Elset, elset=_PickedSet6, internal, generate
    1,  1679,     1
** Section: section
*Solid Section, elset=_PickedSet6, material=Material
,
*End Part
**
**
** ASSEMBLY
**
*Assembly, name=Assembly
**
*Instance, name=indenter-1, part=indenter
         25.,    30.077822,           0.
*Node
      1,           0., 6.17088648e-16,           0.
*Nset, nset=indenter-1-RefPt_, internal
1,
*Surface, type=SEGMENTS, name=RigidSurface_, internal
START,          10.,        -1.25
 CIRCL,         -10.,        -1.25,           0.,           0.
*Rigid Body, ref node=indenter-1-RefPt_, analytical surface=RigidSurface_
*End Instance
**
*Instance, name=part, part=part
*End Instance
**
*Nset, nset=bottom, instance=part
  13,  14,  15,  16,  17,  18
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*Elset, elset=bottom, instance=part
   25,   45,   47,   62,   63,   64
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*Nset, nset=nodes, instance=part, generate
    1,  1769,     1
*Nset, nset=refrence_point, instance=indenter-1
 1,
*Elset, elset=__PickedSurf10_S1, internal, instance=part
   17,   19,   34,   35,   36,   37
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*Elset, elset=__PickedSurf10_S3, internal, instance=part
   33,  137,  205,  208,  230,  235,  502,  506,  507,  508,  515,  516, 1065, 1133, 1189
*Elset, elset=__PickedSurf10_S4, internal, instance=part
  207, 1025
*Surface, type=ELEMENT, name=_PickedSurf10, internal
__PickedSurf10_S1, S1
__PickedSurf10_S3, S3
__PickedSurf10_S4, S4
*Elset, elset=__PickedSurf11_S2, internal, instance=part
   1,  91,  92, 112, 265, 344
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*Elset, elset=__PickedSurf11_S4, internal, instance=part
  56,  57,  90, 121, 125, 126
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*Surface, type=ELEMENT, name=_PickedSurf11, internal
__PickedSurf11_S2, S2
__PickedSurf11_S4, S4
*End Assembly
**
** MATERIALS
**
*Material, name=Material
*Hyperelastic, neo hooke
 963.489,0.
**
** INTERACTION PROPERTIES
**
*Surface Interaction, name=IntProp-1
1.,
*Friction
0.,
*Surface Behavior, pressure-overclosure=HARD
**
** BOUNDARY CONDITIONS
**
** Name: bottom Type: Displacement/Rotation
*Boundary
bottom, 1, 1
bottom, 2, 2
bottom, 6, 6
** Name: indenter Type: Displacement/Rotation
*Boundary
refrence_point, 1, 1
refrence_point, 6, 6
**
** INTERACTIONS
**
** Interaction: Int-1
*Contact Pair, interaction=IntProp-1, type=SURFACE TO SURFACE
_PickedSurf11,
** Interaction: Int-2
*Contact Pair, interaction=IntProp-1, type=SURFACE TO SURFACE
_PickedSurf10, indenter-1.RigidSurface_
** ----------------------------------------------------------------
**
** STEP: static
**
*Step, name=static, nlgeom=YES
*Static
1., 1., 1e-05, 1.
*Solution Technique, type=QUASI-NEWTON
**
** BOUNDARY CONDITIONS
**
** Name: indenter Type: Displacement/Rotation
*Boundary
refrence_point, 1, 1, 2.32019
refrence_point, 2, 2, -2.36164
**
** OUTPUT REQUESTS
**
*Restart, write, frequency=0
**
** FIELD OUTPUT: F-Output-1
**
*Output, field
*Node Output
U,
*Element Output, directions=YES
MISES,
*Output, history, frequency=0
*End Step
